*HEADING
AgnuQuena ABS three-point bending
*NODE
1,10.25,-3.6661649e-16,313.90085
2,10.25,-2.5105259e-15,369.265
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*ELEMENT,TYPE=C3D4,ELSET=EALL
1,20277,10344,10357,20265
2,19460,15285,19626,5626
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*NSET,NSET=LEFT
358,359,360,361,362,363
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*NSET,NSET=RIGHT
469,470,471,472,473,474
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*NSET,NSET=LOAD
79,95,241,401,634,635
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*NSET,NSET=LEFTANCHOR
362
*NSET,NSET=RIGHTANCHOR
473
*MATERIAL,NAME=ABS
*ELASTIC
2000.,0.35
*SOLID SECTION,ELSET=EALL,MATERIAL=ABS

*BOUNDARY
LEFT,1,1,0.
RIGHT,1,1,0.
LEFTANCHOR,2,3,0.
RIGHTANCHOR,2,2,0.
*STEP,NLGEOM
*STATIC
0.02,1.0,1.e-6,0.05
*CLOAD
LOAD,1,1.5
*NODE FILE
U
*EL FILE
S,E
*END STEP
